// COMSOL Multiphysics 6.2.0.290 model "Example_2D_NaCl.mph"
// Outline of the model tree

Parameters
  Sim_Duration_T0 = 20  // Simulation duration in acoustic cycles
  Sim_Timestep_T0 = 0.05  // Simulation timestep in acoustic cycles
  f0 = 1000000[Hz]  // Acoustic frequency
  c0 = 1500[m/s]  // Medium speed of sound
  lda0 = c0/f0  // Acoustic wavelength
  P0 = 1e6[Pa]  // Pressure amplitude
  T0 = 1/f0  // Acoustic period
  N_cycles = 5  // Number of pulse cycles
  Focus_X = 0*lda0  // x-coordinate of focus
  Focus_Y = H/2  // y-coordinate of focus
  S1_J = 100 [mA/cm^2]  // Current density at S1
  F = 96485.3321 [C/mol]  // Faraday constant
  R = 8.3145[J/mol/K]  // Universal gas constant
  T = 293.15[K]  // Room temperature
  D = 1e-9[m^2/s]  // Diffusitivity unit
  zA = 1  // Valence of cation
  zB = -1  // Valence of anion
  DA = 1.33*D  // Diffusitivity of cation
  W = 10*lda0  // Width of medium domain
  H = W  // Height of medium domain
  Abs = 2*lda0  // Thickness of acoustic absorbing layer
  r = 0.8  // Tukey window parameter
  DB = 2.03*D  // Diffusitivity of anion
  conc_AB = 0.154[mol/dm^3]  // Concentration of species
  conc_A = conc_AB*abs(zB/zA)  // Concentration of cation
  conc_B = conc_AB*abs(zA/zB)  // Concentration of anion
  uA = DA/R/T  // Mobility of cation
  uB = DB/R/T  // Mobility of anion
  Q = -(DA-DB)/F/(zA*uA-zB*uB)  // Species quotient
  S2_V = 0[V]  // Potential at S2

Functions
  an1: Analytic "Pulse" | funcname = pulse; expr = P0*sin(2*pi*f0*(t-delay_cycles*T0))*tukey((t-delay_cycles*T0)/(N_cycles*T0)); args = {t, delay_cycles}
  pw1: Piecewise "tukey"
    funcname = tukey
    arg = t
    pieces = 
      {0, r/2, 0.5*(1+cos(2*pi/r*(t-r/2)))}
      {r/2, 1-r/2, 1}
      {1-r/2, 1, 0.5*(1+cos(2*pi/r*(t-1+r/2)))}
      {-10, 0, 0}
      {1, 10, 0}

Coordinate systems
  ab1: AbsorbingLayer on domains 1, 2, 5-7

Geometry
  geom1 "Geometry 1" (2D, length unit mm)
    r1: Rectangle | pos = {-W/2*10, 0}; layerbottom = off; size = {10*W, 10*H}
    c1: Circle | pos = {Focus_X, Focus_Y}; r = sqrt((W/2)^2+Focus_Y^2)
    dif1: Difference | input = c1; input2 = r1
    r2: Rectangle
      pos = {-W/2-Abs, 0}
      layername = Layer 1
      layer = Abs
      layerleft = on
      layerright = on
      layerbottom = off
      layertop = on
      size = {W+2*Abs, H+Abs}
    pt1: Point | p = {Focus_X, Focus_Y}
    fin: Finalize "Form Union"

Materials
  mat1: Common "H2O (water) [liquid]" on all domains
    def "Basic"
      thermalconductivity = k_liquid_2(T)
      thermalexpansioncoefficient = (alpha_liquid_2(T)+(Tempref-293[K])*if(abs(T-Tempref)>1e-3,(alpha_liquid_2(T)-alpha_liquid_2(Tempref))/(T-Tempref),d(alpha_liquid_2(T),T)))/(1+alpha_liquid_2(Tempref)*(Tempref-293[K]))
      heatcapacity = C_liquid_2(T)
      HC = HC_liquid_2(T)
      VP = VP_liquid_2(T)
      density = rho_liquid_2(T)
      TD = TD_liquid_2(T)
      dynamicviscosity = eta_liquid_1(T)
      SurfF = SurfF(T)
      soundspeed = c0
      k_liquid_2: Piecewise | arg = T; pieces = {275.0, 370.0, -0.9003748+0.008387698*T^1-1.118205E-5*T^2}; argunit = K; fununit = W/(m*K)
      alpha_liquid_2: Piecewise
        arg = T
        pieces = 
          {273.15, 283.0, 0.01032507-7.62815E-5*T^1+1.412474E-7*T^2}
          {283.0, 373.16, -0.00246418935+1.947611E-5*T^1-5.049672E-8*T^2+4.616995E-11*T^3}
        argunit = K
        fununit = 1/K
      C_liquid_2: Piecewise | arg = T; pieces = {293.0, 373.16, 4035.84079+0.492312034*T^1}; argunit = K; fununit = J/(kg*K)
      HC_liquid_2: Piecewise | arg = T; pieces = {293.0, 373.16, 72.6451184+0.00886161577*T^1}; argunit = K; fununit = J/(mol*K)
      VP_liquid_2: Piecewise | arg = T; pieces = {280.0, 600.0, (exp((-2.00512183e+03/T-5.56570000e-01*log10(T)+9.89879000e+00-1.11169009e+07/T^3)*log(10.0)))*1.33320000e+02}; argunit = K; fununit = Pa
      rho_liquid_2: Piecewise
        arg = T
        pieces = 
          {273.15, 283.0, 972.757815+0.2084*T^1-4.0E-4*T^2}
          {283.0, 373.16, 345.28+5.749816*T^1-0.0157244*T^2+1.264375E-5*T^3}
        argunit = K
        fununit = kg/m^3
      TD_liquid_2: Piecewise | arg = T; pieces = {273.15, 333.16, 8.04E-8+2.0E-10*T^1}; argunit = K; fununit = m^2/s
      eta_liquid_1: Piecewise | arg = T; pieces = {265.0, 423.16, exp(1.47297892E+11/T^4 - 1.56916127E+09/T^3 + 6.52798499E+06/T^2 - 1.10421451E+04/T - 2.86320560E+00)}; argunit = K; fununit = Pa*s
      SurfF: Piecewise
        arg = T
        pieces = 
          {274.0, 568.0, 0.0774685638+2.071003E-4*T^1-1.23147E-6*T^2+2.344068E-9*T^3-3.033107E-12*T^4+1.758716E-15*T^5}
          {568.0, 647.0, -109.3735+0.9291756*T^1-0.003154159*T^2+5.351438E-6*T^3-4.539449E-9*T^4+1.540327E-12*T^5}
        argunit = K
        fununit = N/m
    ThermalExpansion
      alphatan = CTE_liquid_2(T)
      dL = (dL_liquid_2(T)-dL_liquid_2(Tempref))/(1+dL_liquid_2(Tempref))
      dL_liquid_2: Piecewise
        arg = T
        pieces = 
          {273.15, 283.0, 0.00848615773-6.947021E-5*T^1+1.333373E-7*T^2}
          {283.0, 373.16, 0.232446447-0.002030447*T^1+5.510259E-6*T^2-4.395999E-9*T^3}
        argunit = K
      CTE_liquid_2: Piecewise
        arg = T
        pieces = 
          {273.15, 283.0, -6.947321E-5+2.666746E-7*T^1}
          {283.0, 293.0, -0.0136371499+8.893977E-5*T^1-1.43925E-7*T^2}
          {293.0, 373.16, -0.00203045035+1.102052E-5*T^1-1.3188E-8*T^2}
        argunit = K
        fununit = 1/K

Physics
  pate: PressureAcousticsTimeExplicit on all domains
    dependent variable p
    ReferencePressure.ReferenceType = ReferencePressureWater
    patem1: PressureAcousticsTimeExplicitModel (default)
    shw1: SoundHard "Sound Hard Boundary (Wall) 1" (default)
    tfc1: TotalFieldsContinuity "Continuity of Total Fields" (default)
    init1: init "Initial Values 1" (default)
    pre1: Pressure on boundaries 18, 19 | p0 = pulse(t,0)
  tcd: TertiaryCurrentDistributionNernstPlanck on domains 3
    dependent variable A = {A, B}
    dz.dz = Abs
    d.d = Bg_thickness
    SpeciesActivity.SpeciesActivity = Ideal
    AdvancedSettings.ConvectiveTerm = cons
    sp1: SpeciesProperties "Species Charges" (default) | z = {zA, zB}
    ice1: Electrolyte (default)
      u = {withsol('sol1',u,setval(t,t)), withsol('sol1',v,setval(t,t)), 0}
      DiffusionMaterialList = none
      MobilityModel = NernstEinstein
      D_A = DA
      D_B = DB
      D_Na = DNa
      D_Cl = DCl
    nflx1: NoFlux (default) | IncludeConvection = 1
    ein1: ElectricInsulation "Insulation 1" (default)
    init1: init "Initial Values 1" (default) | initc = {0, conc_B}
    icd1: ElectrolyteNormalCurrentDensity "S1_Plane" on boundaries 6 | nil = S1_J
    eip4: ElectrolytePotential "S2_Plane" on boundaries 11 | philbnd = S2_V

Mesh
  mesh1 "Mesh 1" (physics-controlled)
    size: MeshSizeDefault | table = timeexplicitwave; hauto = 1

Studies
  std1 "Study 1"
    time: Transient "Time Dependent" | tlist = range(0,Sim_Timestep_T0*T0,Sim_Duration_T0*T0); solve for = {pate}
  std2 "Study 2"
    time: Transient "Time Dependent"
      tlist = range(0,Sim_Timestep_T0*T0,Sim_Duration_T0*T0)
      solve for = {tcd}
      useparam = on
      sweeptype = filled
      pname = S1_J
      plistarr = 100,-100
      punit = mA/cm^2

Solver configurations
  sol1 "Acoustics Part" (study std1)
    v1: Variables "Dependent Variables 1"
    tx1: TimeExplicit "Time-Explicit Solver 1"
      tlist = range(0,Sim_Timestep_T0*T0,Sim_Duration_T0*T0)
      tstepping = elemexprs
      exprs = {root.comp1.pate.wtc, root.comp1.pate.wtc}
      dDef: Direct
  sol2 "Electrochemistry Part" (study std2)
    v1: Variables "Dependent Variables 1"
      comp1_phil: Field "Electrolyte potential (comp1.phil)" | scalemethod = manual; scaleval = 1
    t1: Time "Time-Dependent Solver 1"
      tlist = range(0,Sim_Timestep_T0*T0,Sim_Duration_T0*T0)
      rtol = 0.001
      maxstepconstraintbdf = const
      maxstepbdf = Sim_Timestep_T0*T0
      maxorder = 2
      eventout = on
      tp1: TimeParametric
      fc1: FullyCoupled | linsolver = d1; dtech = auto
      d1: Direct "Direct (tcd)" | linsolver = pardiso

Datasets
  dset2: Solution | solution = sol1
  dset3: Solution | solution = sol2

Plots
  pg3: PlotGroup2D "Field Plots" | data = dset3
    surf3: Surface "Pressure, P" | expr = withsol('sol1',p,setval(t,t)); unit = MPa
      trn1: Translation | trans = {-W-2*Abs, 0}
    surf14: Surface "Concentration change, Δc" | expr = (A-conc_AB)/conc_AB; unit = 1
      trn1: Translation | trans = {-W-2*Abs, -H-2*Abs}
    surf1: Surface "Potential change under positive current density, Φ+"
      expr = withsol('sol2',phil,setval(S1_J,S1_J),setval(t,t))-withsol('sol2',phil,setval(S1_J,S1_J),setind(t,1))
      unit = µV
      trn1: Translation
    surf15: Surface "Potential change under negative current density, Φ-"
      expr = withsol('sol2',phil,setval(S1_J,-S1_J),setval(t,t))-withsol('sol2',phil,setval(S1_J,-S1_J),setind(t,1))
      unit = µV
      trn1: Translation | trans = {0, -H-2*Abs}
    surf5: Surface "Common mode potential, Φc = Φ+ (+) Φ-"
      expr = withsol('sol2',phil,setval(t,t),setval(S1_J,S1_J))+withsol('sol2',phil,setval(t,t),setval(S1_J,-S1_J))
      unit = µV
      trn1: Translation | trans = {W+2*Abs, 0}
    surf4: Surface "Differential mode potential, Φd = Φ+ (-) Φ-"
      expr = withsol('sol2',phil,setval(t,t),setval(S1_J,S1_J))-withsol('sol2',phil,setval(t,t),setval(S1_J,-S1_J))-(withsol('sol2',phil,setind(t,1),setval(S1_J,S1_J))-withsol('sol2',phil,setind(t,1),setval(S1_J,-S1_J)))
      unit = µV
      trn1: Translation | trans = {+W+2*Abs, -H-2*Abs}